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/batch
! ANSYS input file written by Workbench version 2022 R2
! File used for geometry attach: C:\Users\takla\AppData\Local\Temp\WB_takla_19208_2\wbnew_files\dp0\SYS\DM\SYS.agdb
/title,wbnew--Static Structural (A5)
/COM,/COM,     ANSYSMotion, 2022.2
/com,--- Data in consistent MKS units. See Solving Units in the help system for more information.
/units,MKS
/prep7
! Turn off shape checking because checks already performed inside WB mesher.
! See help system for more information.
SHPP,OFF,,NOWARN
etcon,set             ! allow ANSYS to choose best KEYOP's for 180x elements, resets any applicable keyopt to MAPDL defaults
/com,*********** Nodes for the whole assembly ***********
nblock,3,,7882
(1i9,3e20.9e3)
      438     0.000000000E+00     9.708402634E+00     0.000000000E+00
      439     0.000000000E+00     3.486202037E-01     0.000000000E+00
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-1
/com,*********** Elements for Body 1 "Surface Body" ***********
et,1,183
keyo,1,3,1
eblock,19,solid,,2255
(19i9)
        1        1        1        1        0        0        0        0        8        0      184      881      862      870      870     3444     3443      870     3466
        1        1        1        1        0        0        0        0        8        0      185      858      859     2875     2875     3432     3437     2875     3433
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-1
/com,*********** Elements for Body 2 "Surface Body" ***********
et,2,183
keyo,2,3,1
eblock,19,solid,,53
(19i9)
        2        2        2        2        0        0        0        0        8        0      131      461      464      494      494      563      570      494      564
        2        2        2        2        0        0        0        0        8        0      132      493      495      491      489      626      622      616      618
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-1
/com,*********** Send User Defined Coordinate System(s) ***********
csys,0
toffst,273.15,  ! Temperature offset from absolute zero
/com,*********** Set Reference Temperature ***********
tref,22.
/com,*********** Send Materials ***********
Temperature = 'TEMP' ! Temperature
MP,DENS,1,7850,	! kg m^-3
MP,ALPX,1,1.2e-05,	! C^-1
MP,C,1,434,	! J kg^-1 C^-1
MP,KXX,1,60.5,	! W m^-1 C^-1
MP,RSVX,1,1.7e-07,	! kg m^3 A^-2 s^-3
MP,EX,1,200000000000,	! Pa
MP,NUXY,1,0.3,
MP,MURX,1,10000,

Temperature = 'TEMP' ! Temperature
MP,DENS,2,7850,	! kg m^-3
MP,ALPX,2,1.2e-05,	! C^-1
MP,C,2,434,	! J kg^-1 C^-1
MP,KXX,2,60.5,	! W m^-1 C^-1
MP,RSVX,2,1.7e-07,	! kg m^3 A^-2 s^-3
MP,EX,2,200000000000,	! Pa
MP,NUXY,2,0.3,
MP,MURX,2,10000,

/com,*********** Send Sheet Properties ***********
!************************* Model Summary ********************
!Surface Body,	Structural Steel,	matid,	1
!Surface Body,	Structural Steel,	matid,	2
!************************* End Model Summary ********************
/com,*********** Create Contact "Frictional - Surface Body To Surface Body" ***********
*set,tid,4
*set,cid,3
r,tid
r,cid
et,tid,169
et,cid,172
eblock,10,,,27
(15i9)
     2439        4        4        4        0      462      461      562
     2440        4        4        4        0      439      462      520
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-1
eblock,10,,,27
(15i9)
     2466        3        3        3        0      462      461      562
     2467        3        3        3        0      439      462      520
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-1
eblock,10,,,56
(15i9)
     2493        3        4        3        0      786      785     3270
     2494        3        4        3        0      787      786     3272
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-1
eblock,10,,,56
(15i9)
     2549        4        3        4        0      786      785     3270
     2550        4        3        4        0      787      786     3272
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-1
keyo,cid,8,2               ! auto create asymmetric contact (from Program Controlled setting)
keyo,cid,10,0              ! adjust contact stiffness each NR iteration (from Program Controlled setting)
keyo,cid,12,0              ! standard contact
mp,mu,cid,0.2       ! unitless
keyo,cid,2,0               ! augmented Lagrange (from Program Controlled setting)
keyo,cid,4,0               ! on Gauss point (from Program Controlled setting)
keyo,cid,9,0               ! use real geometry with stepped effects
keyo,cid,7,0               ! No Prediction
rmod,tid,3,1.       ! FKN
rmod,tid,5,0.       ! ICONT
rmod,tid,6,1.       ! PINB
rmod,tid,10,0.      ! CNOF
rmod,tid,12,0.      ! FKT
rmod,tid,36,43      ! WB DSID
rmod,cid,3,1.       ! FKN
rmod,cid,5,0.       ! ICONT
rmod,cid,6,1.       ! PINB
rmod,cid,10,0.      ! CNOF
rmod,cid,12,0.      ! FKT
rmod,cid,36,43      ! WB DSID
nsel,all
esel,all
/com,********* Frictionless Supports Y *********
CMBLOCK,_FRICSUY,NODE,      113
(8i10)
       648       689       690       691       692       693       694       695
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cmsel,s,_FRICSUY
d,all,uy,0
nsel,all
/com,******* Constant Zero Displacement X *******
CMBLOCK,_DISPZEROUX,NODE,      210
(8i10)
       438       439       440       441       442       443       444       445
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cmsel,s,_DISPZEROUX
d,all,ux,0
nsel,all
fini
/com,****************************************************************************
/com,*************************    SOLUTION       ********************************
/com,****************************************************************************
/solu
antype,0                   ! static analysis
nlgeom,on                  ! Turn on Large Deformation Effects
_thickRatio=  0     ! Ratio of thick parts in the model
eqsl,sparse,,,,,1
cntr,print,1               ! print out contact info and also make no initial contact an error
dmpoption,emat,no             ! Don't combine emat file for DANSYS
dmpoption,esav,no             ! Don't combine esav file for DANSYS
nldiag,cont,iter           ! print out contact info each equilibrium iteration
rescontrol,define,last,last,,dele	   ! Program Controlled
/com,****************************************************
/com,******************* SOLVE FOR LS 1 OF 1 ****************
/com,*** Set Displacements ***
CMBLOCK,_CM46UY_YP,NODE,      210
(8i10)
       438       439       440       441       442       443       444       445
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cmsel,s,_CM46UY_YP
d,all,uy,-1.
nsel,all

/com,*** Component For All Non-Zero UY Displacements ***
cmsel,s,_CM46uy_yp
cm,_DISPNONZEROUY,NODE
nsel,all

autots,on                  ! Workbench Program Controlled automatic time stepping
nsub,1,10,1                ! due to presence of general nonlinear
time,1.
outres,erase
outres,all,none
outres,nsol,all,
outres,rsol,all
outres,eangl,all
outres,etmp,all
outres,veng,all
outres,strs,all,
outres,epel,all,
outres,eppl,all,
outres,cont,all,
! *********** WB SOLVE COMMAND ***********
! check interactive state
*get,ANSINTER_,active,,int
*if,ANSINTER_,ne,0,then
/eof
*endif
solve
/com *************** Write FE CONNECTORS *********
CEWRITE,file,ce,,INTE
/com,****************************************************
/com,*************** FINISHED SOLVE FOR LS 1 *************
*get,_NSOLTHREADS,active,0,ntfs
*get,_NSOLPROCESSES,active,0,npfs
/post1
fini
